*Heading
** Job name: Job-1 Model name: Model-1
** Generated by: Abaqus/CAE 2022
*Preprint, echo=NO, model=NO, history=NO, contact=NO
**
** PARTS
**
*Part, name=Part-1
*Node
      1,           0.,           0.,           0.
      2,           0.,          20.,           0.
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*Element, type=C3D4
    1,  913,  914,  915,  916
    2,  913,  916,  917,  918
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*Nset, nset=Set-1, generate
    1,  2483,     1
*Elset, elset=Set-1, generate
     1,  12135,      1
*Nset, nset=Wire-1-Set-1
   1,   3,   4,   6,   8,   9
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*Elset, elset=Wire-1-Set-1
   125,   229,   299,   400,   677,  1620
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*Nset, nset=Wire-2-Set-1
   1,   2,   5,   7,   9,  10
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*Elset, elset=Wire-2-Set-1
   400,   419,   522,   692,   783,  1023
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** Section: Section-1
*Solid Section, elset=Set-1, material=Material-1
,
*End Part
**
**
** ASSEMBLY
**
*Assembly, name=Assembly
**
*Instance, name=Part-1-1, part=Part-1
*End Instance
**
*Node
      1, -1.2246468e-15,           0.,          40.
*Nset, nset=Set-RP-1
 1,
*Nset, nset=Set-bottom_surface, instance=Part-1-1
   1,   2,   3,   4,   7,  11
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*Elset, elset=Set-bottom_surface, instance=Part-1-1
   229,   400,   460,   522,   671,   783
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*Nset, nset=Set-surface, instance=Part-1-1, generate
   1,  912,    1
*Elset, elset=Set-surface, instance=Part-1-1
    21,    33,    97,   113,   114,   125
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*Nset, nset=Set-top_surface, instance=Part-1-1
   5,   6,   8,   9,  10,  62
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*Elset, elset=Set-top_surface, instance=Part-1-1
    21,    97,   113,   272,   291,   404
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*Elset, elset=_Surf-bottom_surface_S3, internal, instance=Part-1-1
   229,   400,   460,   522,   671,   783
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*Elset, elset=_Surf-bottom_surface_S2, internal, instance=Part-1-1
 1825, 1933, 1934, 1992, 3410
*Elset, elset=_Surf-bottom_surface_S4, internal, instance=Part-1-1
  1837,  1939,  2052,  3456,  3605,  8821,  9507,  9608,  9737, 11859, 12030
*Elset, elset=_Surf-bottom_surface_S1, internal, instance=Part-1-1
  2156,  5568,  9416, 11959, 12024
*Surface, type=ELEMENT, name=Surf-bottom_surface
_Surf-bottom_surface_S3, S3
_Surf-bottom_surface_S2, S2
_Surf-bottom_surface_S4, S4
_Surf-bottom_surface_S1, S1
*Elset, elset=_Surf-top_surface_S3, internal, instance=Part-1-1
   97,  113,  272,  291,  404,  435
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*Elset, elset=_Surf-top_surface_S1, internal, instance=Part-1-1
   21,  418, 2554, 2747, 2877, 2953
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*Elset, elset=_Surf-top_surface_S4, internal, instance=Part-1-1
  2786,  3287,  4133,  4242,  4645,  4812,  4832,  5322,  5733,  6151,  6532,  6774,  7630,  9547, 10350, 10855
*Elset, elset=_Surf-top_surface_S2, internal, instance=Part-1-1
  1493,  2510,  3280,  3303,  4136,  4895,  5222,  6233,  6540,  6566,  6636,  6720,  7133,  8450,  9449, 11430
*Surface, type=ELEMENT, name=Surf-top_surface
_Surf-top_surface_S3, S3
_Surf-top_surface_S1, S1
_Surf-top_surface_S4, S4
_Surf-top_surface_S2, S2
** Constraint: Constraint-1
*Coupling, constraint name=Constraint-1, ref node=Set-RP-1, surface=Surf-top_surface
*Kinematic
**
** INTEGRATED OUTPUT SECTIONS
**
*Integrated Output Section, name=I-Section-1, surface=Surf-bottom_surface, project orientation=NO
*End Assembly
**
** MATERIALS
**
*Material, name=Material-1
*Elastic
 0.2, 0.4
**
** BOUNDARY CONDITIONS
**
** Name: BC-1 Type: Symmetry/Antisymmetry/Encastre
*Boundary
Set-bottom_surface, ENCASTRE
** ----------------------------------------------------------------
**
** STEP: Step-1
**
*Step, name=Step-1, nlgeom=YES
*Static
1., 1., 1e-05, 1.
**
** BOUNDARY CONDITIONS
**
** Name: BC-2 Type: Displacement/Rotation
*Boundary
Set-RP-1, 1, 1, u1
Set-RP-1, 2, 2, u2
Set-RP-1, 3, 3, u3
Set-RP-1, 4, 4, ur1
Set-RP-1, 5, 5, ur2
Set-RP-1, 6, 6, ur3
**
** OUTPUT REQUESTS
**
*Restart, write, frequency=0
**
** FIELD OUTPUT: F-Output-1
**
*Output, field
*Node Output
U,
*Element Output, directions=YES
S,
**
** HISTORY OUTPUT: H-Output-1
**
*Output, history
*Integrated Output, section=I-Section-1
SOF, SOM
*End Step
